# ========== Shear Modulus Simulation ==========
# Starting from isolated swollen gel configuration (snug box, no piston/support/walls)
# Variables from bash script: dataname, interaction, epsSS, epsSP, nsteps
#
# Atom types: 1=polymer, 2=crosslinker, 3=solvent (if swollen gel)
#
# Reduced LJ units: tau = sigma*sqrt(m/epsilon)
# dt = 0.005 → 1e6 steps ≈ 4.1e3 tau
#
# Simple shear in the xz plane:
#   - Target deformation applied via change_box all xz final <target_xz> remap.
#     All atoms displaced affinely proportional to z in one instantaneous step.
#   - Phase 2 then runs NVT at the LOCKED box geometry (no fix deform).
#     The x-periodic bond topology enforces gel_strain = target_strain_xz:
#     bonds crossing the x-PBC carry an image offset of xz in x — a topological
#     constraint NVT cannot relax without an NPT barostat changing the box shape.
#   - G = σ_xz / γ  (measured in Phase 3 at thermal equilibrium)
#
# Why NOT fix deform remap x (previous approach — FAILED for elastic gels):
#   fix deform remap x displaces atoms affinely every step, but FENE bonds and
#   crosslinks generate elastic restoring velocities that partially undo each
#   remap displacement.  For a stiff crosslinked network the gel COM strain
#   saturates far below target_strain_xz (observed: ~0.045 for γ_target=0.10).
#   Locking the box at the target geometry avoids this competition entirely.
#
# Why NOT fix move rheometer plates (even earlier — also FAILED):
#   fix move overrides atom velocity post-integration; FENE bonds at the
#   driven/interior interface stretch monotonically.
#
# Phases:
#   1. Brief NPT equilibration (undeformed, isotropic)
#   2. Shear application: change_box xz final + NVT relaxation at fixed geometry
#   3. NVT production at fixed deformed geometry → time-averaged stresses → G
#
# Outputs (all in the timestamped lammps_runs/ working directory):
#   log.lammps                                    bulk pressure: pxx pyy pzz pxy pxz pyz
#   stress_data/stress_tensor_polymer_*.dat        box-integrated 6-component stress (time-avg)
#   stress_data/stress_tensor_solvent_*.dat        same for solvent
#   stress_data/stress_profile_z_polymer_*.dat     z-binned 6-component stress profile (time-avg)
#   stress_data/stress_profile_z_solvent_*.dat     same for solvent
#   stress_data/shear_strain_*.dat                 4 cols: step  gel_lz_initial  gel_thick  gel_strain_cm(polymer COM)
#   volume_data/gel_dimensions_rg_*.dat            Rg-based gel dimensions
#   volume_data/box_dimensions_*.dat               lx ly lz xy xz yz vs step
#   volume_data/polymer_com_*.dat                  polymer centre of mass vs step
#   traj_files/prod_*.lammpstrj                    sparse trajectory (for vol fraction analysis)


# ==========================================================================
#                              PARAMETERS
# ==========================================================================

# ----- Physical Parameters -----
variable sigma          equal 1.0
variable temp_target    equal 1.0
variable P_target       equal 1.5
variable timestep_prod  equal 0.005

# ----- Shear Parameters -----
# Keep target_strain_xz <= 0.10 to remain in the linear (elastic) regime
variable target_strain_xz equal 0.10

# ----- Phase Lengths -----
variable nsteps_equil  equal 50000    # Phase 1: NPT equilibration steps
variable nsteps_shear  equal 285000   # Phase 2: shear steps (~30% slower vshear vs 200k)
# nsteps (Phase 3 production) comes from bash via -var nsteps

# ----- Output Frequencies -----
variable thermo_freq     equal 10000
variable dump_freq_setup equal 10000
variable dump_freq_prod  equal 10000
variable stress_freq     equal 5000

# ----- Time Averaging (stress) -----
# Adaptive: targets num_stress_curves output frames, with bounded nrepeat
# nfreq = nevery × nrepeat  (LAMMPS constraint)
variable num_stress_curves equal 10
variable nevery_target     equal 100    # ~0.5 τ — near stress decorrelation time
variable nrepeat_max       equal 2000   # cap to preserve transient resolution
variable nrepeat_min       equal 50     # floor for adequate noise reduction

variable nfreq_raw    equal floor(${nsteps}/v_num_stress_curves)
variable nrepeat_raw  equal floor(v_nfreq_raw/v_nevery_target)

variable nr_lo equal (v_nrepeat_raw>v_nrepeat_min)*v_nrepeat_raw+(v_nrepeat_raw<=v_nrepeat_min)*v_nrepeat_min
variable nrepeat_stress equal (v_nr_lo<v_nrepeat_max)*v_nr_lo+(v_nr_lo>=v_nrepeat_max)*v_nrepeat_max
variable nevery_stress equal floor(v_nfreq_raw/v_nrepeat_stress)
variable nfreq_stress  equal v_nevery_stress*v_nrepeat_stress

print ">>> Stress averaging: nevery=${nevery_stress}  nrepeat=${nrepeat_stress}  nfreq=${nfreq_stress}"
print ">>> Shear: γ_target=${target_strain_xz}  nsteps_shear=${nsteps_shear} (NVT relax at fixed xz)"

# ----- Spatial Binning -----
variable binWidth    equal 2.0
variable rg_scale    equal 1.8    # Rg multiplier for analysis region sizing (~90% coverage)
variable region_frac equal 1


# ==========================================================================
#                           INITIALIZATION
# ==========================================================================

units lj
dimension 3
boundary p p p
atom_style molecular
atom_modify map array

# WCA (purely repulsive, rc = 2^(1/6) σ ≈ 1.122) — consistent with slab_with_flow.
pair_style lj/cut 1.122
bond_style fene

read_data data_files/${dataname}.data nocoeff

comm_modify cutoff 5.0

print "========================================"
print "Shear slab simulation: ${dataname}"
print "Interaction: epsSS=${epsSS}, epsSP=${epsSP}"
print "Production steps: ${nsteps}"
print "Target shear strain: ${target_strain_xz}"
print "Shear method: change_box instantaneous + NVT relax"
print "========================================"


# ==========================================================================
#                          GROUP DEFINITIONS
# ==========================================================================

group polymer    type 1 2
group backbone   type 1      # backbone polymer only (2 FENE bonds each — safe at driven boundary)
group crosslinks type 2      # crosslinkers (4+ FENE bonds — kept in interior_mobile always)
group solvent    type 3
group all_mobile type 1 2 3


# ==========================================================================
#                       INTERATOMIC POTENTIALS
# ==========================================================================

# WCA for all pairs by default
pair_coeff * * 1.0 ${sigma} 1.122

# Tunable polymer-solvent and solvent-solvent interactions
pair_coeff 1 3 ${epsSP} ${sigma} 1.122    # polymer-solvent
pair_coeff 2 3 ${epsSP} ${sigma} 1.122    # crosslinker-solvent
pair_coeff 3 3 ${epsSS} ${sigma} 1.122    # solvent-solvent

# FENE bonds (Kremer-Grest): K=30, R0=1.5, epsilon=1, sigma=1
bond_coeff * 30.0 1.5 1.0 1.0
special_bonds fene

neigh_modify delay 0 every 1 check yes


# ==========================================================================
#                           THERMO OUTPUT
# ==========================================================================

# Mobile temperature and pressure computed explicitly (matches slab_with_flow convention)
compute mobile_temp all_mobile temp
compute mobile_press all pressure mobile_temp pair bond

# All 6 pressure tensor components + tilt factors in thermo for bulk pressure comparison
thermo_style custom step c_mobile_temp pe ke etotal press c_mobile_press &
    pxx pyy pzz pxy pxz pyz vol lx ly lz xy xz yz
thermo_modify lost warn
thermo ${thermo_freq}


# ==========================================================================
#              PHASE 1: NPT EQUILIBRATION (Undeformed)
# ==========================================================================
# Isotropic NPT relaxes any residual pressure from the isolated-gel data file.
# Box starts orthogonal; xz tilt = 0 throughout.

print "========================================"
print "Phase 1: NPT equilibration (${nsteps_equil} steps)"
print "========================================"

reset_timestep 0
timestep ${timestep_prod}

# Convert orthogonal box → triclinic (xz=0 initially) so fix deform can tilt it in Phase 2.
# Must be done before any dump is defined (LAMMPS restriction).
# NPT iso works fine on triclinic boxes.
change_box all triclinic

# Setup trajectory (captures Phase 1 and Phase 2 for visual inspection)
dump traj_setup all_mobile custom ${dump_freq_setup} &
    traj_files/setup_${dataname}_${interaction}_${nsteps}.lammpstrj &
    id type mol x y z

# Brief energy minimisation to resolve any residual overlaps in the data file
minimize 1.0e-4 1.0e-6 500 5000

fix npt_equil all_mobile npt temp ${temp_target} ${temp_target} 1.0 &
    iso ${P_target} ${P_target} 10.0
run ${nsteps_equil}
unfix npt_equil

print ">>> Post-equilibration T = $(c_mobile_temp)  P = $(press)"
print ">>> Box after Phase 1: $(lx) x $(ly) x $(lz)"


# ==========================================================================
#                  GEL CHARACTERIZATION (post-equilibration)
# ==========================================================================
# Snapshot gel extent → trim box z.
# Rg tensor → analysis region sizing (consistent with slab_with_flow convention).

compute polymer_com polymer com

# z-extent only (minz/maxz) — used to trim the simulation box
compute minz polymer reduce min z
compute maxz polymer reduce max z

# Radius of gyration tensor: c_rg_tensor[i] = Rg_ii^2 (diagonal)
# For a uniform rectangular prism: L_i = 2*sqrt(3) * sqrt(Rg_ii^2)
compute rg_tensor polymer gyration

variable gel_lx_rg equal 2.0*sqrt(3.0*c_rg_tensor[1])
variable gel_ly_rg equal 2.0*sqrt(3.0*c_rg_tensor[2])
variable gel_lz_rg equal 2.0*sqrt(3.0*c_rg_tensor[3])
variable gel_vol_rg equal v_gel_lx_rg*v_gel_ly_rg*v_gel_lz_rg

run 0   # initialise ALL computes in one pass before snapshotting

# ----- Snapshot gel z-extent as constants (evaluated NOW via $()) -----
variable gel_zlo   equal $(c_minz)
variable gel_zhi   equal $(c_maxz)

# Shrink box z to gel extent + 1σ buffer on each side.
# This ensures exactly one gel per simulation box and makes the xz tilt
# geometrically consistent with the gel thickness.
variable box_zlo equal $(v_gel_zlo - 1.0)
variable box_zhi equal $(v_gel_zhi + 1.0)
change_box all z final ${box_zlo} ${box_zhi} remap
print ">>> Box z resized to gel extent: ${box_zlo} to ${box_zhi}  (lz = $(lz))"

print ">>> Gel z-extent: ${gel_zlo} to ${gel_zhi}"

# Rg snapshot for analysis region sizing (slab_with_flow convention)
variable Rg_xx equal c_rg_tensor[1]
variable Rg_yy equal c_rg_tensor[2]
variable Rg_zz equal c_rg_tensor[3]

print "Rg  gel: $(v_gel_lx_rg) x $(v_gel_ly_rg) x $(v_gel_lz_rg)"

variable eps equal 1.0e-12
variable hw_x equal v_region_frac*v_rg_scale*sqrt(v_Rg_xx + v_eps)
variable hw_y equal v_region_frac*v_rg_scale*sqrt(v_Rg_yy + v_eps)
variable hw_z equal v_region_frac*v_rg_scale*sqrt(v_Rg_zz + v_eps)

# Initial gel thickness (Rg-based z) — stored as constant for shear strain tracking
# γ = xz_tilt / gel_lz_initial  (computed in analysis notebook from shear_strain_*.dat)
variable gel_lz_initial equal $(v_gel_lz_rg)
print ">>> Initial gel thickness (Rg): ${gel_lz_initial}"

# ----- Polymer gel shear tracking (COM method) — PRIMARY strain measurement -----
# Top and bottom 10% of gel polymer tracked separately.
# gel_strain_cm = (x_COM_top − x_COM_bot − xcm_sep_0) / gel_thick
# This is THE gel shear strain: the relative x-displacement of driven surfaces
# normalised by the gel thickness.  Expected to reach target_strain_xz at end of Phase 2.
#
# Groups are STATIC (post-equilibration z positions).  In Phase 2 they are DRIVEN
# by fix move; in Phase 3 they are held frozen by fix move linear 0 0 0.
# Cross-linked gels don't diffuse so static group membership stays representative.

variable shear_frac   equal 0.05
variable gel_thick    equal $(v_gel_zhi - v_gel_zlo)

# Freeze z-bounds for top/bottom 10% of gel as constants
variable top_zlo_val  equal $(v_gel_zhi - v_shear_frac*(v_gel_zhi - v_gel_zlo))
variable bot_zhi_val  equal $(v_gel_zlo + v_shear_frac*(v_gel_zhi - v_gel_zlo))

region reg_top block EDGE EDGE EDGE EDGE ${top_zlo_val} ${gel_zhi} units box
region reg_bot block EDGE EDGE EDGE EDGE ${gel_zlo} ${bot_zhi_val} units box
group top_all    region reg_top
group bot_all    region reg_bot
group poly_top_s intersect backbone top_all    # backbone only — crosslinkers stay in interior_mobile
group poly_bot_s intersect backbone bot_all    # backbone only — crosslinkers stay in interior_mobile

compute xcm_top poly_top_s com
compute xcm_bot poly_bot_s com

run 0   # force xcm compute initialization before snapshotting

# Snapshot x-COM separation as a constant (reference state before shear)
variable xcm_sep_0     equal $(c_xcm_top[1] - c_xcm_bot[1])

# Direct polymer gel shear strain (live, updates every step as xcm evolves)
variable gel_strain_cm equal (c_xcm_top[1] - c_xcm_bot[1] - v_xcm_sep_0) / v_gel_thick

print ">>> gel_thick (actual z-span):           ${gel_thick}"
print ">>> xcm_sep_0 (x-COM top-bot, t=0):      ${xcm_sep_0}"
print ">>> poly_top_s count: $(count(poly_top_s))  poly_bot_s count: $(count(poly_bot_s))"

# ----- Shear velocity: top moves +x, bottom moves -x -----
# vshear chosen so total relative displacement at end of Phase 2 = target_strain_xz × gel_thick
#   2 × vshear × nsteps_shear × dt = target_strain_xz × gel_thick
# For γ=0.10, gel_thick≈13σ, nsteps=200k, dt=0.005: vshear ≈ 0.00065 σ/τ
# This is ~250× slower than the previous fix deform approach.
# Steady-state FENE interface bond extension ≈ vshear/K ≈ vshear/30 ≈ 2×10⁻⁵ σ — safe.
variable vshear     equal $(v_target_strain_xz * v_gel_thick / (2.0 * v_nsteps_shear * v_timestep_prod))
variable neg_vshear equal -v_vshear
print ">>> vshear = ${vshear} σ/τ  (total top displacement = $(v_vshear*v_nsteps_shear*v_timestep_prod) σ)"

# Interior mobile: everything except the driven polymer layers.
# Includes all interior polymer, crosslinkers, and all solvent.
group interior_mobile subtract all_mobile poly_top_s poly_bot_s


# ==========================================================================
#              PHASE 2: SHEAR APPLICATION  (rheometer-style)
# ==========================================================================
# Top polymer layer (poly_top_s) driven at +vshear in x.
# Bottom polymer layer (poly_bot_s) driven at -vshear in x.
# Interior polymer + all solvent (interior_mobile) thermostated by NVT.
# Box stays ORTHOGONAL — xz = 0 throughout.
#
# fix move linear overrides atom velocity to the specified value each step.
# The FENE bonds coupling each driven layer to the interior drag the gel slowly,
# maintaining steady-state interface bond extension ≈ vshear/K ≈ 2×10⁻⁵ σ (safe).
#
# Shear strain measurement:
#   gel_strain_cm = (x_COM_top − x_COM_bot − xcm_sep_0) / gel_thick
#   Rises linearly from 0 → target_strain_xz over Phase 2.
#
# Periodic image note: top/bottom atoms each move ±0.05×gel_thick ≈ ±0.65σ in x,
# negligible vs lx.  z-profile analysis and Rg-based regions track the primary
# slab and are unaffected.

print "========================================"
print "Phase 2: Rheometer shear (${nsteps_shear} steps)"
print "  poly_top_s: +x at vshear = ${vshear} σ/τ"
print "  poly_bot_s: -x at vshear = ${neg_vshear} σ/τ"
print "  Expected gel_strain_cm at end: ${target_strain_xz}"
print "========================================"

fix nvt_shear  interior_mobile nvt temp ${temp_target} ${temp_target} 1.0
fix mom_shear  interior_mobile momentum 100 linear 1 1 1
fix move_top   poly_top_s move linear ${vshear} 0 0
fix move_bot   poly_bot_s move linear ${neg_vshear} 0 0

# Columns: step  gel_lz_initial  gel_thick  gel_strain_cm
# gel_strain_cm rises linearly; any deviation indicates slip or FENE failure.
fix out_shear_strain all print ${stress_freq} &
    "$(step) ${gel_lz_initial} ${gel_thick} $(v_gel_strain_cm)" &
    file output_files/stress_data/shear_strain_${dataname}_${interaction}_${nsteps}.dat screen no

run ${nsteps_shear}

unfix out_shear_strain
unfix move_bot
unfix move_top
unfix mom_shear
unfix nvt_shear
undump traj_setup

print ">>> Phase 2 complete"
print ">>>   gel_strain_cm = $(v_gel_strain_cm)  (target: ${target_strain_xz})"
print ">>> Post-shear gel (Rg): $(v_gel_lx_rg) x $(v_gel_ly_rg) x $(v_gel_lz_rg)"

# Freeze Rg-based region half-widths as constants (gel geometry now fixed)
variable hw_x equal $(v_hw_x)
variable hw_y equal $(v_hw_y)
variable hw_z equal $(v_hw_z)

print ">>> hw_x=${hw_x}  hw_y=${hw_y}  hw_z=${hw_z}"


# ==========================================================================
#                    ANALYSIS: PARTIAL STRESSES
# ==========================================================================
# stress/atom gives per-atom virial in units of [pressure × volume].
# Two output forms:
#   (a) Box-integrated 6-component tensor: sum over all atoms / total volume
#       → directly comparable to thermo bulk pressure (pxx pyy pzz pxy pxz pyz)
#   (b) z-binned 6-component profile: per-atom virial / bin_volume, summed per bin
#       → local stress as a function of z position

compute stress_polymer polymer stress/atom NULL
compute stress_solvent  solvent  stress/atom NULL

# ----- (a) Box-integrated polymer stress tensor -----
compute sig_p_xx polymer reduce sum c_stress_polymer[1]
compute sig_p_yy polymer reduce sum c_stress_polymer[2]
compute sig_p_zz polymer reduce sum c_stress_polymer[3]
compute sig_p_xy polymer reduce sum c_stress_polymer[4]
compute sig_p_xz polymer reduce sum c_stress_polymer[5]
compute sig_p_yz polymer reduce sum c_stress_polymer[6]

variable stress_p_xx equal c_sig_p_xx/vol
variable stress_p_yy equal c_sig_p_yy/vol
variable stress_p_zz equal c_sig_p_zz/vol
variable stress_p_xy equal c_sig_p_xy/vol
variable stress_p_xz equal c_sig_p_xz/vol
variable stress_p_yz equal c_sig_p_yz/vol

# ----- (a) Box-integrated solvent stress tensor -----
compute sig_s_xx solvent reduce sum c_stress_solvent[1]
compute sig_s_yy solvent reduce sum c_stress_solvent[2]
compute sig_s_zz solvent reduce sum c_stress_solvent[3]
compute sig_s_xy solvent reduce sum c_stress_solvent[4]
compute sig_s_xz solvent reduce sum c_stress_solvent[5]
compute sig_s_yz solvent reduce sum c_stress_solvent[6]

variable stress_s_xx equal c_sig_s_xx/vol
variable stress_s_yy equal c_sig_s_yy/vol
variable stress_s_zz equal c_sig_s_zz/vol
variable stress_s_xy equal c_sig_s_xy/vol
variable stress_s_xz equal c_sig_s_xz/vol
variable stress_s_yz equal c_sig_s_yz/vol

# ----- (b) Per-atom z-bin stress variables (pre-divided by bin volume lx*ly*binWidth) -----
# Summed over each z-bin by fix ave/chunk (norm none) → local stress per bin volume
variable s_p_xx atom c_stress_polymer[1]/(lx*ly*${binWidth})
variable s_p_yy atom c_stress_polymer[2]/(lx*ly*${binWidth})
variable s_p_zz atom c_stress_polymer[3]/(lx*ly*${binWidth})
variable s_p_xy atom c_stress_polymer[4]/(lx*ly*${binWidth})
variable s_p_xz atom c_stress_polymer[5]/(lx*ly*${binWidth})
variable s_p_yz atom c_stress_polymer[6]/(lx*ly*${binWidth})

variable s_s_xx atom c_stress_solvent[1]/(lx*ly*${binWidth})
variable s_s_yy atom c_stress_solvent[2]/(lx*ly*${binWidth})
variable s_s_zz atom c_stress_solvent[3]/(lx*ly*${binWidth})
variable s_s_xy atom c_stress_solvent[4]/(lx*ly*${binWidth})
variable s_s_xz atom c_stress_solvent[5]/(lx*ly*${binWidth})
variable s_s_yz atom c_stress_solvent[6]/(lx*ly*${binWidth})


# ==========================================================================
#                    ANALYSIS: SPATIAL CHUNKS (z-binning)
# ==========================================================================

# Full-box z-binning (no lateral region restriction — full gel profile)
# Triclinic boxes require units reduced (fractional coords, 0–1).
# Snapshot binWidth as a fraction of lz NOW (lz is fixed post-Phase 2).
# Physical bin thickness = binWidth_reduced × lz = binWidth, so per-atom
# normalisation (÷ lx·ly·binWidth) in the stress variables remains correct.
variable binWidth_reduced equal $(v_binWidth/lz)
compute chunk_z_polymer polymer chunk/atom bin/1d z lower ${binWidth_reduced} units reduced
compute chunk_z_solvent  solvent  chunk/atom bin/1d z lower ${binWidth_reduced} units reduced


# ==========================================================================
#              PHASE 3: NVT PRODUCTION (Fixed Deformed Geometry)
# ==========================================================================
# Driven layers held at Phase 2 final positions via fix move linear 0 0 0
# (velocity = 0 → atoms frozen at their last-step positions).
# Interior polymer + solvent (interior_mobile) equilibrate freely under NVT.
# Stress relaxes toward equilibrium: G = σ_xz / gel_strain_cm.
#
# Frozen driven layers are the correct boundary condition for measuring G:
# they impose a fixed-strain state without any driving force.
# compute stress/atom NULL uses the virial (forces), not velocities, so the
# zero velocity of frozen atoms does NOT contaminate σ_xz.
#
# fix momentum angular:
#   Any residual angular momentum from the antisymmetric Phase 2 drive is
#   removed every 100 steps from interior_mobile.  Safe: virial-based stress
#   is unaffected by velocity corrections.

print "========================================"
print "Phase 3: NVT production (${nsteps} steps)"
print "  Gel shear strain: $(v_gel_strain_cm)  (target: ${target_strain_xz})"
print "  Driven layers frozen; interior_mobile thermostated at T=${temp_target}"
print "========================================"

fix hold_top  poly_top_s     move linear 0 0 0     # freeze top layer at Phase 2 final x
fix hold_bot  poly_bot_s     move linear 0 0 0     # freeze bottom layer at Phase 2 final x
fix nvt_prod  interior_mobile nvt temp ${temp_target} ${temp_target} 1.0
fix mom_zero  interior_mobile momentum 100 linear 1 1 1 angular

# Production trajectory — sparse, all mobile atoms (for volume fraction extraction)
dump traj_prod all_mobile custom ${dump_freq_prod} &
    traj_files/prod_${dataname}_${interaction}_${nsteps}.lammpstrj &
    id type mol x y z


# ==========================================================================
#    OUTPUT: BOX-INTEGRATED STRESS TENSOR (time-averaged scalars)
# ==========================================================================
# Columns: step  sigma_xx  sigma_yy  sigma_zz  sigma_xy  sigma_xz  sigma_yz
# KEY OUTPUT for G: sigma_xz / shear_strain_current → shear modulus G

fix avg_stress_polymer all ave/time ${nevery_stress} ${nrepeat_stress} ${nfreq_stress} &
    v_stress_p_xx v_stress_p_yy v_stress_p_zz &
    v_stress_p_xy v_stress_p_xz v_stress_p_yz &
    file output_files/stress_data/stress_tensor_polymer_${dataname}_${interaction}_${nsteps}.dat

fix avg_stress_solvent all ave/time ${nevery_stress} ${nrepeat_stress} ${nfreq_stress} &
    v_stress_s_xx v_stress_s_yy v_stress_s_zz &
    v_stress_s_xy v_stress_s_xz v_stress_s_yz &
    file output_files/stress_data/stress_tensor_solvent_${dataname}_${interaction}_${nsteps}.dat


# ==========================================================================
#    OUTPUT: Z-PROFILE STRESS TENSOR (time-averaged per z-bin)
# ==========================================================================
# fix ave/chunk with norm none: sums pre-normalized per-atom virial over each bin,
# then time-averages → local stress component in that z-slice.
# File columns: chunk_id  z_coord  count  s_xx  s_yy  s_zz  s_xy  s_xz  s_yz

fix prof_z_polymer polymer ave/chunk ${nevery_stress} ${nrepeat_stress} ${nfreq_stress} &
    chunk_z_polymer &
    v_s_p_xx v_s_p_yy v_s_p_zz v_s_p_xy v_s_p_xz v_s_p_yz &
    norm none &
    file output_files/stress_data/stress_profile_z_polymer_${dataname}_${interaction}_${nsteps}.dat

fix prof_z_solvent solvent ave/chunk ${nevery_stress} ${nrepeat_stress} ${nfreq_stress} &
    chunk_z_solvent &
    v_s_s_xx v_s_s_yy v_s_s_zz v_s_s_xy v_s_s_xz v_s_s_yz &
    norm none &
    file output_files/stress_data/stress_profile_z_solvent_${dataname}_${interaction}_${nsteps}.dat


# ==========================================================================
#    OUTPUT: GEL AND BOX DIMENSIONS
# ==========================================================================

# Gel dimensions — Rg-based (robust estimate; matches slab_with_flow convention)
fix out_gel_dims_rg all print ${stress_freq} &
    "$(step) $(v_gel_lx_rg) $(v_gel_ly_rg) $(v_gel_lz_rg)" &
    file output_files/volume_data/gel_dimensions_rg_${dataname}_${interaction}_${nsteps}.dat screen no

# Box dimensions including tilt factors (xy, xz, yz) — xz should be constant in Phase 3
fix out_box_dims all print ${stress_freq} &
    "$(step) $(lx) $(ly) $(lz) $(xy) $(xz) $(yz)" &
    file output_files/volume_data/box_dimensions_${dataname}_${interaction}_${nsteps}.dat screen no

# Polymer centre of mass
fix out_polymer_com all print ${stress_freq} &
    "$(step) $(c_polymer_com[1]) $(c_polymer_com[2]) $(c_polymer_com[3])" &
    file output_files/volume_data/polymer_com_${dataname}_${interaction}_${nsteps}.dat screen no


# ==========================================================================
#                         PRODUCTION RUN
# ==========================================================================

run ${nsteps}


# ==========================================================================
#                            CLEANUP
# ==========================================================================

undump traj_prod
unfix mom_zero
unfix nvt_prod
unfix hold_bot
unfix hold_top

print "========================================"
print "Shear slab simulation complete"
print "Final gel_strain_cm: $(v_gel_strain_cm)  (target: ${target_strain_xz})"
print "Final gel_lz_initial: ${gel_lz_initial}  gel_thick: ${gel_thick}"
print "Final box: $(lx) x $(ly) x $(lz)  (xz=0, orthogonal throughout)"
print "========================================"

variable outfile string "final_shear_${dataname}_${interaction}_${nsteps}"
write_data ${outfile}.data
